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/batch
! ANSYS input file written by Workbench version 2024 R1
/assign,rstp,file,rst              ! Force Eigen analysis to write to file.rst because WB expects it
/solu
antype,,restart,,,perturbation

/title,Do_al Titre_im analizi--Eigenvalue Buckling 2 (D5)
/COM,/COM,     ANSYSMotion, 2024.1
perturb,buckle,,CURRENT,ALLKEEP                    ! linear buckling analysis keeping loads from pre-stress analysis
solve, elform                                       ! Generate matrices needed for perturbation analysis
bucopt,lanb,1,,,center
outres,erase
outres,all,none
outres,nsol,all
mxpand                    ! default expand in case of complex solution
! *********** WB SOLVE COMMAND ***********
! check interactive state
*get,ANSINTER_,active,,int
*if,ANSINTER_,ne,0,then
/eof
*endif
solve
/com *************** Write FE CONNECTORS *********
CEWRITE,file,ce,,INTE
*get,_nmodalsolproc,active,0,numcpu
fini
*get,_NSOLTHREADS,active,0,ntfs
*get,_NSOLPROCESSES,active,0,npfs
/post1
fini
